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/batch
! ANSYS input file written by Workbench version 2024 R2
! File used for geometry attach: C:\Users\Aditya\OneDrive - YA\Desktop\Mechanics Of Materials\Project\Main Project File\gemetory.dsco
/title,wbnew--Static Structural (A5)
/COM,/COM,     ANSYSMotion, 2024.2
/com,--- Data in consistent NMM units. See Solving Units in the help system for more information.
/units,MPA
/prep7
! Turn off shape checking because checks already performed inside WB mesher.
! See help system for more information.
SHPP,OFF,,NOWARN
etcon,set             ! allow ANSYS to choose best KEYOP's for 180x elements, resets any applicable keyopt to MAPDL defaults
/com,*********** Nodes for the whole assembly ***********
nblock,3,,10125
(1i9,3e20.9e3)
        1     1.970149254E+02     2.500000000E+00     2.857142857E+00
        2     1.970149254E+02     2.500000000E+00     5.714285714E+00
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-1
/com,*********** Elements for Body 1 'Beam(2)(2)_1\Beam' ***********
et,1,186
keyo,1,2,1          ! set full integration on SOLID186
eblock,19,solid,,938
(19i9)
        1        1        1        1        0        0        0        0       20        0        1        1     1566     1350     1337      792     1632     1349     1343
     1638     5335     5315     1637     4152     5334     5327     4151     1635     5691     5333     5314
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-1
/com,*********** Elements for Body 2 'Support(2)(2)_1\Support' ***********
et,2,186
keyo,2,2,1          ! set full integration on SOLID186
eblock,19,solid,,217
(19i9)
        2        2        2        2        0        0        0        0       20        0      939     5769     5877     5817     5823     5922     5904     5914     5913
     6131     6323     6322     6129     6583     6581     6605     6606     6133     6530     6324     6348
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-1
/com,*********** Elements for Body 3 'Support(2)(2)_1\Support.2' ***********
et,3,186
keyo,3,2,1          ! set full integration on SOLID186
eblock,19,solid,,217
(19i9)
        3        3        3        3        0        0        0        0       20        0     1156     6929     7037     6977     6983     7082     7064     7074     7073
     7291     7483     7482     7289     7743     7741     7765     7766     7293     7690     7484     7508
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-1
/com,*********** Elements for Body 4 'Load\Load' ***********
et,4,186
keyo,4,2,1          ! set full integration on SOLID186
eblock,19,solid,,210
(19i9)
        4        4        4        4        0        0        0        0       20        0     1373     8101     8185     8191     8203     8233     8219     8218     8216
     8503     8786     8806     8504     8875     8872     8866     8868     8505     8787     8807     8844
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-1
/com,*********** Send User Defined Coordinate System(s) ***********
csys,0
toffst,273.15,      ! Temperature offset from absolute zero
/com,*********** Set Reference Temperature ***********
tref,22.
/com,*********** Send Materials ***********
Temperature = 'TEMP' ! Temperature
MP,DENS,1,8.942e-09,	! tonne mm^-3
MP,EX,1,126000,	! tonne s^-2 mm^-1
MP,NUXY,1,0.345,
MP,ALPX,1,1.674e-05,	! C^-1
MP,KXX,1,396.7,	! tonne mm s^-3 C^-1
MP,C,1,383300000,	! mm^2 s^-2 C^-1
MP,RSVX,1,1.74e-05,	! ohm mm

Temperature = 'TEMP' ! Temperature
MP,DENS,2,7.85e-09,	! tonne mm^-3
MP,ALPX,2,1.2e-05,	! C^-1
MP,C,2,434000000,	! mm^2 s^-2 C^-1
MP,KXX,2,60.5,	! tonne mm s^-3 C^-1
MP,RSVX,2,0.00017,	! ohm mm
MP,EX,2,200000,	! tonne s^-2 mm^-1
MP,NUXY,2,0.3,
MP,MURX,2,10000,

Temperature = 'TEMP' ! Temperature
MP,DENS,3,7.85e-09,	! tonne mm^-3
MP,ALPX,3,1.2e-05,	! C^-1
MP,C,3,434000000,	! mm^2 s^-2 C^-1
MP,KXX,3,60.5,	! tonne mm s^-3 C^-1
MP,RSVX,3,0.00017,	! ohm mm
MP,EX,3,200000,	! tonne s^-2 mm^-1
MP,NUXY,3,0.3,
MP,MURX,3,10000,

Temperature = 'TEMP' ! Temperature
MP,DENS,4,7.85e-09,	! tonne mm^-3
MP,ALPX,4,1.2e-05,	! C^-1
MP,C,4,434000000,	! mm^2 s^-2 C^-1
MP,KXX,4,60.5,	! tonne mm s^-3 C^-1
MP,RSVX,4,0.00017,	! ohm mm
MP,EX,4,200000,	! tonne s^-2 mm^-1
MP,NUXY,4,0.3,
MP,MURX,4,10000,

!************************* Model Summary ********************
!Beam(2)(2)_1\Beam,	Copper, pure, C10100, hard,	matid,	1
!Support(2)(2)_1\Support,	Structural Steel,	matid,	2
!Support(2)(2)_1\Support.2,	Structural Steel,	matid,	3
!Load\Load,	Structural Steel,	matid,	4
!************************* End Model Summary ********************
/com,*********** Create Contact "Contact Region" ***********
*set,tid,6
*set,cid,5
r,tid
r,cid
et,tid,170
et,cid,174
eblock,10,,,56
(15i9)
     3337        6        6        6        0     6050     6056     5951     5952     6875     6683     6682     6685
     3338        6        6        6        0     6051     6059     6056     6050     6877     6886     6875     6874
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-1
eblock,10,,,56
(15i9)
     3393        5        5        5        0     6050     6056     5951     5952     6875     6683     6682     6685
     3394        5        5        5        0     6051     6059     6056     6050     6877     6886     6875     6874
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-1
eblock,10,,,469
(15i9)
     3449        5        6        5        0     1189      793     1330     1329     4155     4156     5298     5018
     3450        5        6        5        0     1190      799      793     1189     4174     4154     4155     5017
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-1
eblock,10,,,469
(15i9)
     3918        6        5        6        0     1189      793     1330     1329     4155     4156     5298     5018
     3919        6        5        6        0     1190      799      793     1189     4174     4154     4155     5017
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-1
keyo,cid,8,2               ! auto create asymmetric contact (from Program Controlled setting)
keyo,cid,10,0              ! adjust contact stiffness each NR iteration (from Program Controlled setting)
keyo,cid,12,0              ! standard contact
keyo,cid,18,1              ! small sliding turned on by application
keyo,cid,2,0               ! augmented Lagrange (from Program Controlled setting)
keyo,cid,4,0               ! on Gauss point (from Program Controlled setting)
keyo,cid,9,1               ! ignore initial gaps/penetration
keyo,cid,5,1               ! auto CNOF adjustment to close geometric gap only
keyo,cid,7,0               ! No Prediction
rmod,tid,3,1.       ! FKN
rmod,tid,5,0.       ! ICONT
rmod,tid,6,0.       ! PINB
rmod,tid,10,0.      ! CNOF
rmod,tid,12,0.      ! FKT
rmod,tid,36,40      ! WB DSID
rmod,cid,3,1.       ! FKN
rmod,cid,5,0.       ! ICONT
rmod,cid,6,0.       ! PINB
rmod,cid,10,0.      ! CNOF
rmod,cid,12,0.      ! FKT
rmod,cid,36,40      ! WB DSID
/com,*********** Create Contact "Contact Region 2" ***********
*set,tid,8
*set,cid,7
r,tid
r,cid
et,tid,170
et,cid,174
eblock,10,,,56
(15i9)
     4387        8        8        8        0     7210     7216     7111     7112     8035     7843     7842     7845
     4388        8        8        8        0     7211     7219     7216     7210     8037     8046     8035     8034
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-1
eblock,10,,,56
(15i9)
     4443        7        7        7        0     7210     7216     7111     7112     8035     7843     7842     7845
     4444        7        7        7        0     7211     7219     7216     7210     8037     8046     8035     8034
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-1
eblock,10,,,469
(15i9)
     4499        7        8        7        0     1189      793     1330     1329     4155     4156     5298     5018
     4500        7        8        7        0     1190      799      793     1189     4174     4154     4155     5017
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-1
eblock,10,,,469
(15i9)
     4968        8        7        8        0     1189      793     1330     1329     4155     4156     5298     5018
     4969        8        7        8        0     1190      799      793     1189     4174     4154     4155     5017
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-1
keyo,cid,8,2               ! auto create asymmetric contact (from Program Controlled setting)
keyo,cid,10,0              ! adjust contact stiffness each NR iteration (from Program Controlled setting)
keyo,cid,12,0              ! standard contact
keyo,cid,18,1              ! small sliding turned on by application
keyo,cid,2,0               ! augmented Lagrange (from Program Controlled setting)
keyo,cid,4,0               ! on Gauss point (from Program Controlled setting)
keyo,cid,9,1               ! ignore initial gaps/penetration
keyo,cid,5,1               ! auto CNOF adjustment to close geometric gap only
keyo,cid,7,0               ! No Prediction
rmod,tid,3,1.       ! FKN
rmod,tid,5,0.       ! ICONT
rmod,tid,6,0.       ! PINB
rmod,tid,10,0.      ! CNOF
rmod,tid,12,0.      ! FKT
rmod,tid,36,43      ! WB DSID
rmod,cid,3,1.       ! FKN
rmod,cid,5,0.       ! ICONT
rmod,cid,6,0.       ! PINB
rmod,cid,10,0.      ! CNOF
rmod,cid,12,0.      ! FKT
rmod,cid,36,43      ! WB DSID
/com,*********** Create Contact "Contact Region 3" ***********
*set,tid,10
*set,cid,9
r,tid
r,cid
et,tid,170
et,cid,174
eblock,10,,,56
(15i9)
     5437       10       10       10        0     8305     8277     8276     8275     9000     8997     8995     8996
     5438       10       10       10        0     8304     8280     8277     8305     9007     8999     9000     9056
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-1
eblock,10,,,56
(15i9)
     5493        9        9        9        0     8305     8277     8276     8275     9000     8997     8995     8996
     5494        9        9        9        0     8304     8280     8277     8305     9007     8999     9000     9056
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-1
eblock,10,,,469
(15i9)
     5549        9       10        9        0     1343      792     1632     1349     4151     4152     5334     5327
     5550        9       10        9        0      792      786     1631     1632     4138     4139     5756     4152
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-1
eblock,10,,,469
(15i9)
     6018       10        9       10        0     1343      792     1632     1349     4151     4152     5334     5327
     6019       10        9       10        0      792      786     1631     1632     4138     4139     5756     4152
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-1
keyo,cid,8,2               ! auto create asymmetric contact (from Program Controlled setting)
keyo,cid,10,0              ! adjust contact stiffness each NR iteration (from Program Controlled setting)
keyo,cid,12,0              ! standard contact
keyo,cid,18,1              ! small sliding turned on by application
keyo,cid,2,0               ! augmented Lagrange (from Program Controlled setting)
keyo,cid,4,0               ! on Gauss point (from Program Controlled setting)
keyo,cid,9,1               ! ignore initial gaps/penetration
keyo,cid,5,1               ! auto CNOF adjustment to close geometric gap only
keyo,cid,7,0               ! No Prediction
rmod,tid,3,1.       ! FKN
rmod,tid,5,0.       ! ICONT
rmod,tid,6,0.       ! PINB
rmod,tid,10,0.      ! CNOF
rmod,tid,12,0.      ! FKT
rmod,tid,36,46      ! WB DSID
rmod,cid,3,1.       ! FKN
rmod,cid,5,0.       ! ICONT
rmod,cid,6,0.       ! PINB
rmod,cid,10,0.      ! CNOF
rmod,cid,12,0.      ! FKT
rmod,cid,36,46      ! WB DSID
nsel,all
esel,all
/com,******* Constant Zero Displacement X *******
CMBLOCK,_DISPZEROUX,NODE,     2153
(8i10)
       793       794       795       796       797       798       799       800
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cmsel,s,_DISPZEROUX
d,all,ux,0
nsel,all
/com,******* Constant Zero Displacement Y *******
CMBLOCK,_DISPZEROUY,NODE,      398
(8i10)
      5956      5957      5958      5959      5960      5961      5962      5963
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cmsel,s,_DISPZEROUY
d,all,uy,0
nsel,all
/com,******* Constant Zero Displacement Z *******
CMBLOCK,_DISPZEROUZ,NODE,     2153
(8i10)
       793       794       795       796       797       798       799       800
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cmsel,s,_DISPZEROUZ
d,all,uz,0
nsel,all
/com,*********** Create Displacement Tables and Functions ******

*DIM,_loadvari61xp,TABLE,2,1,1,TIME, , , 0
! Time values
*TAXIS,_loadvari61xp(1),1,0.,1.
! Load values
_loadvari61xp(1,1,1) = 0.
_loadvari61xp(2,1,1) = 0.


*DIM,_loadvari61xn,TABLE,2,1,1,TIME, , , 0
! Time values
*TAXIS,_loadvari61xn(1),1,0.,1.
! Load values
_loadvari61xn(1,1,1) = 0.
_loadvari61xn(2,1,1) = 0.


*DIM,_loadvari61yp,TABLE,3,1,1,TIME, , , 0
! Time values
*TAXIS,_loadvari61yp(1),1,0.,1.,2.
! Load values
_loadvari61yp(1,1,1) = 0.
_loadvari61yp(2,1,1) = 10.
_loadvari61yp(3,1,1) = 0.


*DIM,_loadvari61yn,TABLE,3,1,1,TIME, , , 0
! Time values
*TAXIS,_loadvari61yn(1),1,0.,1.,2.
! Load values
_loadvari61yn(1,1,1) = 0.
_loadvari61yn(2,1,1) = -10.
_loadvari61yn(3,1,1) = 0.


*DIM,_loadvari61zp,TABLE,2,1,1,TIME, , , 0
! Time values
*TAXIS,_loadvari61zp(1),1,0.,1.
! Load values
_loadvari61zp(1,1,1) = 0.
_loadvari61zp(2,1,1) = 0.


*DIM,_loadvari61zn,TABLE,2,1,1,TIME, , , 0
! Time values
*TAXIS,_loadvari61zn(1),1,0.,1.
! Load values
_loadvari61zn(1,1,1) = 0.
_loadvari61zn(2,1,1) = 0.


fini
/com,****************************************************************************
/com,*************************    SOLUTION       ********************************
/com,****************************************************************************
/solu
antype,0                   ! static analysis
_thickRatio=0.75    ! Ratio of thick parts in the model
eqsl,pcg,1e-8,,,,,,1
cntr,print,1               ! print out contact info and also make no initial contact an error
cncheck,dmp		!	Enable program controlled contact splitting for distributed memory parallel run
dmpoption,emat,no             ! Don't combine emat file for DANSYS
dmpoption,esav,no             ! Don't combine esav file for DANSYS
nldiag,cont,iter           ! print out contact info each equilibrium iteration
rescontrol,define,last,last,,dele	   ! Program Controlled
/com,****************************************************
/com,******************* SOLVE FOR LS 1 OF 2 ****************
/com,*** Set Displacements ***
CMBLOCK,_CM61UY_YP,NODE,      199
(8i10)
      8261      8262      8263      8264      8265      8266      8267      8268
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cmsel,s,_CM61UY_YP
d,all,uy,%_loadvari61yp%
nsel,all

/com,*** Component For All Non-Zero UY Displacements ***
cmsel,s,_CM61uy_yp
cm,_DISPNONZEROUY,NODE
nsel,all

autots,on                   ! User turned on automatic time stepping
nsub,50,100,10,OFF
time,1.
outres,erase
outres,all,none
outres,nsol,all,
outres,rsol,all
outres,eangl,all
outres,etmp,all
outres,veng,all
outres,strs,all,
outres,epel,all,
outres,eppl,all,
outres,cont,all,
! *********** WB SOLVE COMMAND ***********
! check interactive state
*get,ANSINTER_,active,,int
*if,ANSINTER_,ne,0,then
/eof
*endif
solve
/com *************** Write FE CONNECTORS *********
CEWRITE,file,ce,,INTE
/com,****************************************************
/com,*************** FINISHED SOLVE FOR LS 1 *************
/com,****************************************************
/com,******************* SOLVE FOR LS 2 OF 2 ****************
/com,*** Set Displacements ***
autots,on                  ! Workbench Program Controlled automatic time stepping
nsub,1,10,1                ! due to presence of general nonlinear
time,2.
outres,erase
outres,all,none
outres,nsol,all,
outres,rsol,all
outres,eangl,all
outres,etmp,all
outres,veng,all
outres,strs,all,
outres,epel,all,
outres,eppl,all,
outres,cont,all,
solve
/com,****************************************************
/com,*************** FINISHED SOLVE FOR LS 2 *************
*get,_NSOLTHREADS,active,0,ntfs
*get,_NSOLPROCESSES,active,0,npfs
*get,_PCGITER,active,,solu,cgiter
/post1
fini
